*Heading
** Job name: 2024_Ej_2 Model name: Model-1
** Generated by: Abaqus/CAE Learning Edition 2022
*Preprint, echo=NO, model=NO, history=NO, contact=NO
**
** PARTS
**
*Part, name=Part-4
*Node
      1,          17.,          3.5
      2,          10.,           0.
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*Element, type=DC2D3
1,  33,   2,  34
2, 267, 249, 246
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*Element, type=DC2D4
  7, 196,  12,  13, 215
  8, 210,  48,  49, 228
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*Nset, nset=_PickedSet2_#1, internal
   5,   6,   8,  65,  66,  67
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*Elset, elset=_PickedSet2_#1, internal, generate
 561,  788,    1
*Nset, nset=_PickedSet2_#2, internal
   1,   2,   5,   6,   7,   9
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*Elset, elset=_PickedSet2_#2, internal, generate
 161,  560,    1
*Nset, nset=_PickedSet2_#3, internal
   1,   2,   3,   4,   9,  10
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*Elset, elset=_PickedSet2_#3, internal, generate
   1,  160,    1
** Section: Section-3
*Solid Section, elset=_PickedSet2_#3, material=Material-3
,
** Section: Section-2
*Solid Section, elset=_PickedSet2_#2, material=Material-2
,
** Section: Section-1
*Solid Section, elset=_PickedSet2_#1, material=Material-1
,
*End Part
**
**
** ASSEMBLY
**
*Assembly, name=Assembly
**
*Instance, name=Part-4-1, part=Part-4
*End Instance
**
*Nset, nset=_PickedSet10, internal, instance=Part-4-1
   5,   8, 164, 165, 166, 167
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*Elset, elset=_PickedSet10, internal, instance=Part-4-1
 561, 565, 580, 586, 589, 590
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*Nset, nset=_PickedSet11, internal, instance=Part-4-1
   1,   7, 131, 132, 133, 134
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*Elset, elset=_PickedSet11, internal, instance=Part-4-1
 162, 181, 284, 286, 291, 292
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*Nset, nset=_PickedSet12, internal, instance=Part-4-1
  3,  4, 56, 57
*Elset, elset=_PickedSet12, internal, instance=Part-4-1
 47, 92, 94
*End Assembly
**
** MATERIALS
**
*Material, name=Material-1
*Conductivity
 0.001,
*Material, name=Material-2
*Conductivity
 0.003,
*Material, name=Material-3
*Conductivity
 0.02,
** ----------------------------------------------------------------
**
** STEP: Step-1
**
*Step, name=Step-1, nlgeom=NO
*Heat Transfer, steady state, deltmx=0.
1., 1., 1e-05, 1.,
**
** BOUNDARY CONDITIONS
**
** Name: BC-1 Type: Temperature
*Boundary
_PickedSet10, 11, 11, 7.5
** Name: BC-2 Type: Temperature
*Boundary
_PickedSet11, 11, 11, 5.5
** Name: BC-3 Type: Temperature
*Boundary
_PickedSet12, 11, 11, 1.
**
** OUTPUT REQUESTS
**
*Restart, write, frequency=0
**
** FIELD OUTPUT: F-Output-1
**
*Output, field, variable=PRESELECT
*Output, history, frequency=0
*End Step
