*Heading
** Job name: Job-ejer3 Model name: Model-1
** Generated by: Abaqus/CAE Learning Edition 2022
*Preprint, echo=NO, model=NO, history=NO, contact=NO
**
** PARTS
**
*Part, name=Part-1
*Node
      1,   6.08761406,   7.93353319
      2,          10.,           0.
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*Element, type=CPS3
  1,   1,  12, 111
  2, 111,  27,   1
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*Nset, nset=Set-1, generate
   1,  316,    1
*Elset, elset=Set-1, generate
   1,  554,    1
** Section: Section-1
*Solid Section, elset=Set-1, material=lámina
5.,
*End Part
**
**
** ASSEMBLY
**
*Assembly, name=Assembly
**
*Instance, name=Part-1-1, part=Part-1
*End Instance
**
*Nset, nset=Inferior, instance=Part-1-1
  2,  3,  5, 18, 19, 28
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*Elset, elset=Inferior, instance=Part-1-1
 14, 28, 42, 43, 45, 47
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*Nset, nset=Izquierda, instance=Part-1-1
   9,  10,  11,  97,  98,  99, 100, 105, 106
*Elset, elset=Izquierda, instance=Part-1-1
 483, 493, 503, 513, 523, 525, 527, 529
*Elset, elset=_Surf-1_S2, internal, instance=Part-1-1
 77,
*Elset, elset=_Surf-1_S1, internal, instance=Part-1-1
 114, 150, 186, 222, 258, 294, 295, 297, 299, 301, 303
*Surface, type=ELEMENT, name=Surf-1
_Surf-1_S2, S2
_Surf-1_S1, S1
*Elset, elset=_Surf-2_S2, internal, instance=Part-1-1
 77,
*Elset, elset=_Surf-2_S1, internal, instance=Part-1-1
 114, 150, 186, 222, 258, 294, 295, 297, 299, 301, 303
*Surface, type=ELEMENT, name=Surf-2
_Surf-2_S2, S2
_Surf-2_S1, S1
*End Assembly
**
** MATERIALS
**
*Material, name=lámina
*Elastic
70000., 0.33
** ----------------------------------------------------------------
**
** STEP: Cargas
**
*Step, name=Cargas, nlgeom=NO
*Static
1., 1., 1e-05, 1.
**
** BOUNDARY CONDITIONS
**
** Name: BC-1 Type: Displacement/Rotation
*Boundary
Izquierda, 1, 1
** Name: BC-2 Type: Displacement/Rotation
*Boundary
Inferior, 2, 2
**
** LOADS
**
** Name: Load-2   Type: Pressure
*Dsload
Surf-2, P, -50.
**
** OUTPUT REQUESTS
**
*Restart, write, frequency=0
**
** FIELD OUTPUT: F-Output-1
**
*Output, field, variable=PRESELECT
**
** HISTORY OUTPUT: Inf
**
*Output, history
*Node Output, nset=Inferior
RT,
**
** HISTORY OUTPUT: Izq
**
*Node Output, nset=Izquierda
RT,
*End Step
