*Heading
** Job name: 2024_Ej_5 Model name: Model-1
** Generated by: Abaqus/CAE Learning Edition 2022
*Preprint, echo=NO, model=NO, history=NO, contact=NO
**
** PARTS
**
*Part, name=Portico
*Node
      1,           0.,           0.
      2,           0.,           5.
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*Element, type=B21
 1,  1, 15
 2, 15, 16
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*Nset, nset=Set-1
   2,   3,   4,   5,   6,   7
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*Elset, elset=Set-1
  31,  32,  33,  34,  35,  36
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*Nset, nset=Set-2
   1,   2,   3,   4,   5,   7
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*Elset, elset=Set-2
   1,   2,   3,   4,   5,   6
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*Nset, nset=Set-3
   4,   5,   8,   9,  10,  11
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*Elset, elset=Set-3
  48,  49,  50,  51,  52,  53
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*Nset, nset=Set-5, generate
   1,  226,    1
*Elset, elset=Set-5, generate
   1,  229,    1
*Nset, nset=Set-8
   4,   8,  97,  98,  99, 100
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*Elset, elset=Set-8, generate
  90,  106,    1
*Nset, nset=Set-10
   4,   8,  97,  98,  99, 100
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*Elset, elset=Set-10, generate
  90,  106,    1
** Section: Columna  Profile: Columna
*Beam General Section, elset=Set-2, poisson = 0.3, density=2500., section=RECT
0.6, 0.6
0.,0.,-1.
 2.1e+11, 8.1e+10
** Section: VigaIPN  Profile: IPN
*Beam General Section, elset=Set-1, poisson = 0.3, density=2500., section=I
0.3, 0.6, 0.4, 0.4, 0.03, 0.03, 0.02
0.,0.,-1.
 2.1e+11, 8.1e+10
*End Part
**
**
** ASSEMBLY
**
*Assembly, name=Assembly
**
*Instance, name=Portico-1, part=Portico
*End Instance
**
*Nset, nset=Set-1, instance=Portico-1
  6, 12
*Nset, nset=Set-2, instance=Portico-1
  2,  3, 31, 32, 33, 34, 35, 36, 37, 38, 39, 40, 41, 42
*Elset, elset=Set-2, instance=Portico-1, generate
 18,  30,   1
*Nset, nset=Set-3, instance=Portico-1
   7,   9,  10, 125, 126, 127
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*Elset, elset=Set-3, instance=Portico-1
 120, 121, 122, 123, 124, 125
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*Nset, nset=Set-4, instance=Portico-1
 11, 14
*Nset, nset=Set-5, instance=Portico-1
 1,
*End Assembly
**
** MATERIALS
**
*Material, name=Material-1
*Density
2500.,
*Elastic
 2.1e+11, 0.3
** ----------------------------------------------------------------
**
** STEP: Step-1
**
*Step, name=Step-1, nlgeom=NO
*Static
1., 1., 1e-05, 1.
**
** BOUNDARY CONDITIONS
**
** Name: BC-1 Type: Displacement/Rotation
*Boundary
Set-4, 2, 2
** Name: BC-2 Type: Displacement/Rotation
*Boundary
Set-5, 1, 1
Set-5, 2, 2
**
** LOADS
**
** Name: Load-1   Type: Concentrated force
*Cload
Set-1, 2, -500.
** Name: Load-2   Type: Line load
*Dload
Set-2, PX, 10000.
** Name: Load-3   Type: Line load Using Field: AnalyticalField-1
*Dload
Portico-1.120, PY, -10294.1
Portico-1.121, PY, -10882.4
Portico-1.122, PY, -11470.6
Portico-1.123, PY, -12058.8
Portico-1.124, PY, -12647.1
Portico-1.125, PY, -13235.3
Portico-1.126, PY, -13823.5
Portico-1.127, PY, -14411.8
Portico-1.128, PY, -15000.
Portico-1.129, PY, -15588.2
Portico-1.130, PY, -16176.5
Portico-1.131, PY, -16764.7
Portico-1.132, PY, -17352.9
Portico-1.133, PY, -17941.2
Portico-1.134, PY, -18529.4
Portico-1.135, PY, -19117.6
Portico-1.136, PY, -19705.9
Portico-1.196, PY, -294.118
Portico-1.197, PY, -882.353
Portico-1.198, PY, -1470.59
Portico-1.199, PY, -2058.82
Portico-1.200, PY, -2647.06
Portico-1.201, PY, -3235.29
Portico-1.202, PY, -3823.53
Portico-1.203, PY, -4411.77
Portico-1.204, PY, -5000.
Portico-1.205, PY, -5588.23
Portico-1.206, PY, -6176.47
Portico-1.207, PY, -6764.71
Portico-1.208, PY, -7352.94
Portico-1.209, PY, -7941.18
Portico-1.210, PY, -8529.41
Portico-1.211, PY, -9117.65
Portico-1.212, PY, -9705.88
**
** OUTPUT REQUESTS
**
*Restart, write, frequency=0
**
** FIELD OUTPUT: F-Output-1
**
*Output, field
*Node Output
CF, RF, RM, U, UR
*Element Output, directions=YES
NFORCSO, S, SF
**
** HISTORY OUTPUT: H-Output-1
**
*Output, history, variable=PRESELECT
*End Step
