*Heading
** Job name: FinOrd_2425_Ej2 Model name: Model-1
** Generated by: Abaqus/CAE Learning Edition 2022
*Preprint, echo=NO, model=NO, history=NO, contact=NO
**
** PARTS
**
*Part, name=Part-1
*Node
      1,           5.,           6.
      2,           5.,          3.5
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*Element, type=B23
1,  2, 12
2, 12, 13
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*Nset, nset=Set-4
  1,  4,  5,  6,  9, 20
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*Elset, elset=Set-4
 11, 12, 13, 14, 15, 16
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*Nset, nset=Set-5
  1,  2,  3,  6,  7,  8
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*Elset, elset=Set-5
  1,  2,  3,  4,  5,  6
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*Nset, nset=Set-6
  1,  4,  5,  6,  9, 20
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*Elset, elset=Set-6
 11, 12, 13, 14, 15, 16
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*Nset, nset=Set-7
  1,  2,  3,  6,  7,  8
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*Elset, elset=Set-7
  1,  2,  3,  4,  5,  6
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** Section: columna  Profile: Columna
*Beam Section, elset=Set-5, material=concreto, poisson = 0.2, temperature=GRADIENTS, section=RECT
0.4, 0.4
0.,0.,-1.
** Section: viga  Profile: Viga
*Beam Section, elset=Set-6, material=concreto, poisson = 0.2, temperature=GRADIENTS, section=RECT
0.3, 0.6
0.,0.,-1.
*End Part
**
**
** ASSEMBLY
**
*Assembly, name=Assembly
**
*Instance, name=Part-1-1, part=Part-1
*End Instance
**
*Nset, nset=Base, instance=Part-1-1
  3,  8, 11
*Nset, nset=Set-2, instance=Part-1-1
 5,
*Nset, nset=Set-3, instance=Part-1-1
 4,
*Nset, nset=Set-4, instance=Part-1-1
 6,
*Nset, nset=Set-5, instance=Part-1-1
 5,
*Nset, nset=Set-6, instance=Part-1-1
 4,
*Nset, nset=Set-7, instance=Part-1-1
 3,
*Nset, nset=Set-8, instance=Part-1-1
  8, 11
*Nset, nset=Set-9, instance=Part-1-1
  1,  4,  5,  6,  9, 20
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*Elset, elset=Set-9, instance=Part-1-1
 11, 12, 13, 14, 15, 16
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*End Assembly
**
** MATERIALS
**
*Material, name=concreto
*Density
 2548.42,
*Elastic
 3.2e+10, 0.2
**
** BOUNDARY CONDITIONS
**
** Name: BC-1 Type: Symmetry/Antisymmetry/Encastre
*Boundary
Base, ENCASTRE
** ----------------------------------------------------------------
**
** STEP: Cargas
**
*Step, name=Cargas, nlgeom=NO
*Static
1., 1., 1e-05, 1.
**
** LOADS
**
** Name: Peso   Type: Gravity
*Dload
, GRAV, 9.81, 0., -1.
** Name: carga 50   Type: Concentrated force
*Cload
Set-3, 2, -50000.
** Name: carga 70   Type: Concentrated force
*Cload
Set-2, 2, -70000.
** Name: distribuida   Type: Line load
*Dload
Set-9, PY, -100000.
** Name: lateral   Type: Concentrated force
*Cload
Set-4, 1, 488400.
**
** OUTPUT REQUESTS
**
*Restart, write, frequency=0
**
** FIELD OUTPUT: F-Output-1
**
*Output, field
*Node Output
RF, U
*Element Output, directions=YES
E, S, SF
*Output, history, frequency=0
*End Step
