*Heading
** Job name: 2025-finord-ej1 Model name: Model-1
** Generated by: Abaqus/CAE Learning Edition 2025
*Preprint, echo=NO, model=NO, history=NO, contact=NO
**
** PARTS
**
*Part, name=Part-1
*Node
      1,           0.,           0.
      2,           0.,           5.
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*Element, type=CPE8R
  1,  41,  42, 192, 194, 201, 202, 203, 204
  2, 190, 193,  47,   5, 205, 206, 207, 208
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*Nset, nset=Set-1, generate
   1,  554,    1
*Elset, elset=Set-1, generate
   1,  155,    1
** Section: Section-1
*Solid Section, elset=Set-1, material=Material-1
,
*End Part
**
**
** ASSEMBLY
**
*Assembly, name=Assembly
**
*Instance, name=Part-1-1, part=Part-1
*End Instance
**
*Nset, nset=Set-1, instance=Part-1-1
   1,   3,  41,  42,  43,  44,  45, 201, 276, 333, 336, 339, 536
*Elset, elset=Set-1, instance=Part-1-1
   1,  21,  37,  38,  39, 125
*Nset, nset=Set-2, instance=Part-1-1
 8,
*Nset, nset=Set-3, instance=Part-1-1
  16,  17,  74,  75, 249, 408, 411
*Elset, elset=Set-3, instance=Part-1-1
 13, 62, 63
*Elset, elset=_Surf-1_S4, internal, instance=Part-1-1
  12,  54,  59,  64,  73,  74,  99, 101, 104
*Elset, elset=_Surf-1_S2, internal, instance=Part-1-1
  63, 105, 106, 107, 108, 109, 110, 111, 112, 114, 116
*Elset, elset=_Surf-1_S1, internal, instance=Part-1-1
 117,
*Surface, type=ELEMENT, name=Surf-1
_Surf-1_S4, S4
_Surf-1_S2, S2
_Surf-1_S1, S1
*End Assembly
**
** MATERIALS
**
*Material, name=Material-1
*Elastic
 1.8e+11, 0.2
** ----------------------------------------------------------------
**
** STEP: Step-1
**
*Step, name=Step-1, nlgeom=NO
*Static
1., 1., 1e-05, 1.
**
** BOUNDARY CONDITIONS
**
** Name: BC-1 Type: Displacement/Rotation
*Boundary
Set-1, 1, 1
Set-1, 2, 2
** Name: BC-2 Type: Displacement/Rotation
*Boundary
Set-3, 1, 1
**
** LOADS
**
** Name: Load-1   Type: Concentrated force
*Cload
Set-2, 1, -500000.
** Name: Load-2   Type: Surface traction
*Dsload
Surf-1, TRVEC, 2.5e+06, 0., -1., 0.
**
** OUTPUT REQUESTS
**
*Restart, write, frequency=0
**
** FIELD OUTPUT: F-Output-1
**
*Output, field, variable=PRESELECT
**
** HISTORY OUTPUT: H-Output-1
**
*Output, history, variable=PRESELECT
*End Step
