*Heading
** Job name: P5A-10-I Model name: Model-1
** Generated by: Abaqus/CAE Learning Edition 2022
*Preprint, echo=NO, model=NO, history=NO, contact=NO
**
** PARTS
**
*Part, name=Part-1
*Node
      1,           0.,           0.,          10.
      2,           0.,   1.25333238,   9.92114735
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*Element, type=C3D8I
  1, 122, 123, 134, 133,   1,   2,  13,  12
  2, 123, 124, 135, 134,   2,   3,  14,  13
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*Nset, nset=_PickedSet2, internal, generate
   1,  242,    1
*Elset, elset=_PickedSet2, internal, generate
   1,  100,    1
** Section: Section-1
*Solid Section, elset=_PickedSet2, material=Material-1
,
*End Part
**
**
** ASSEMBLY
**
*Assembly, name=Assembly
**
*Instance, name=Part-1-1, part=Part-1
*End Instance
**
*Nset, nset=_PickedSet4, internal, instance=Part-1-1
   1,   2,   3,   4,   5,   6
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*Elset, elset=_PickedSet4, internal, instance=Part-1-1, generate
  1,  10,   1
*Nset, nset=_PickedSet5, internal, instance=Part-1-1
 111, 112, 113, 114, 115, 116
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*Elset, elset=_PickedSet5, internal, instance=Part-1-1, generate
  91,  100,    1
*Nset, nset=_PickedSet6, internal, instance=Part-1-1
 232,
*Nset, nset=_PickedSet7, internal, instance=Part-1-1
 122,
*End Assembly
**
** MATERIALS
**
*Material, name=Material-1
*Elastic
 6.825e+07, 0.3
** ----------------------------------------------------------------
**
** STEP: Step-1
**
*Step, name=Step-1, nlgeom=NO
*Static
1., 1., 1e-05, 1.
**
** BOUNDARY CONDITIONS
**
** Name: BC-1 Type: Symmetry/Antisymmetry/Encastre
*Boundary
_PickedSet4, XSYMM
** Name: BC-2 Type: Symmetry/Antisymmetry/Encastre
*Boundary
_PickedSet5, ZSYMM
**
** LOADS
**
** Name: Load-1   Type: Concentrated force
*Cload
_PickedSet6, 1, 1.
** Name: Load-2   Type: Concentrated force
*Cload
_PickedSet7, 3, -1.
**
** OUTPUT REQUESTS
**
*Restart, write, frequency=0
**
** FIELD OUTPUT: F-Output-1
**
*Output, field, variable=PRESELECT
**
** HISTORY OUTPUT: H-Output-1
**
*Output, history, variable=PRESELECT
*End Step
