*Heading
** Job name: PP+Viento+Nieve Model name: Model-1
** Generated by: Abaqus/CAE Learning Edition 2022
*Preprint, echo=NO, model=NO, history=NO, contact=NO
**
** PARTS
**
*Part, name=Part-1
*Node
      1,           9.,          16.
      2,          14.,          16.
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*Element, type=B21
 1,  1, 31
 2, 31, 32
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*Nset, nset=pisos40x40
   5,   6,   7,   8,   9,  16
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*Elset, elset=pisos40x40
  51,  52,  53,  54,  55,  56
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*Nset, nset=Set-2
   1,   2,   3,   4,   5,  10
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*Elset, elset=Set-2
  31,  32,  33,  34,  35,  36
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*Nset, nset=Set-3
   1,   2,   3,   4,   5,   6
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*Elset, elset=Set-3
   1,   2,   3,   4,   5,   6
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*Nset, nset=Set-4
   2,   3,   4,   5,   6,   7
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*Elset, elset=Set-4
  31,  32,  33,  34,  35,  36
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*Nset, nset=Set-6
   1,  10, 119, 120, 121, 122, 123, 124, 125, 126, 127
*Elset, elset=Set-6, generate
  97,  106,    1
*Nset, nset=Set-8
  12,  22, 352, 353, 354, 355, 356, 357, 358, 359, 360
*Elset, elset=Set-8, generate
 350,  359,    1
*Nset, nset=Set-10, generate
   1,  550,    1
*Elset, elset=Set-10, generate
   1,  565,    1
** Section: sect70x30  Profile: Profile-3
*Beam General Section, elset=Set-3, poisson = 0.25, density=2500., section=RECT
0.7, 0.3
0.,0.,-1.
 3e+10, 1.2e+10
** Section: Sect30x30  Profile: Profile-1
*Beam General Section, elset=Set-2, poisson = 0.25, density=2500., section=RECT
0.4, 0.4
0.,0.,-1.
 3e+10, 1.2e+10
** Section: sect40x40  Profile: Profile-1
*Beam General Section, elset=pisos40x40, poisson = 0.25, density=2500., section=RECT
0.4, 0.4
0.,0.,-1.
 3e+10, 1.2e+10
*End Part
**
**
** ASSEMBLY
**
*Assembly, name=Assembly
**
*Instance, name=Part-1-1, part=Part-1
*End Instance
**
*Nset, nset=Set-1, instance=Part-1-1
  9, 18, 26, 29, 30
*Nset, nset=Set-2, instance=Part-1-1, generate
   1,  550,    1
*Elset, elset=Set-2, instance=Part-1-1, generate
   1,  565,    1
*Nset, nset=Set-3, instance=Part-1-1
  3, 11
*Nset, nset=Set-4, instance=Part-1-1, generate
   1,  550,    1
*Elset, elset=Set-4, instance=Part-1-1, generate
   1,  565,    1
*Nset, nset=Set-5, instance=Part-1-1
  13,  14,  23,  24,  28,  29
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*Elset, elset=Set-5, instance=Part-1-1
 147, 148, 149, 150, 151, 152
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*Nset, nset=Set-6, instance=Part-1-1
   1,   2,   3,  11,  14,  31
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*Elset, elset=Set-6, instance=Part-1-1
   1,   2,   3,   4,   5,   6
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*Elset, elset=_Surf-1_SPOS, internal, instance=Part-1-1
 147, 148, 149, 150, 151, 152
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*Surface, type=ELEMENT, name=Surf-1
_Surf-1_SPOS, SPOS
*Elset, elset=_Surf-2_SPOS, internal, instance=Part-1-1
 147, 148, 149, 150, 151, 152
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*Surface, type=ELEMENT, name=Surf-2
_Surf-2_SPOS, SPOS
*End Assembly
**
** MATERIALS
**
*Material, name=Material-1
*Density
2500.,
*Elastic
 3e+10, 0.25
** ----------------------------------------------------------------
**
** STEP: Step-1
**
*Step, name=Step-1, nlgeom=NO
*Static
1., 1., 1e-05, 1.
**
** BOUNDARY CONDITIONS
**
** Name: BC-1 Type: Displacement/Rotation
*Boundary
Set-1, 1, 1
Set-1, 2, 2
Set-1, 6, 6
**
** LOADS
**
** Name: Load-1   Type: Gravity
*Dload
, GRAV, 9.8, 0., -1.
** Name: Nieve   Type: Line load
*Dload
Set-6, PY, -4500.
** Name: Viento   Type: Line load Using Field: AnalyticalField-1
*Dload
Part-1-1.147, PX, 1223.87
Part-1-1.148, PX, 1237.76
Part-1-1.149, PX, 1251.48
Part-1-1.150, PX, 1265.06
Part-1-1.151, PX, 1278.5
Part-1-1.152, PX, 1291.79
Part-1-1.153, PX, 1304.95
Part-1-1.154, PX, 1317.98
Part-1-1.155, PX, 1330.88
Part-1-1.156, PX, 1343.66
Part-1-1.373, PX, 902.458
Part-1-1.374, PX, 921.196
Part-1-1.375, PX, 939.56
Part-1-1.376, PX, 957.573
Part-1-1.377, PX, 975.252
Part-1-1.378, PX, 992.617
Part-1-1.379, PX, 1009.68
Part-1-1.380, PX, 1026.47
Part-1-1.381, PX, 1042.98
Part-1-1.382, PX, 1059.23
Part-1-1.413, PX, 1075.24
Part-1-1.414, PX, 1091.02
Part-1-1.415, PX, 1106.57
Part-1-1.416, PX, 1121.9
Part-1-1.417, PX, 1137.03
Part-1-1.418, PX, 1151.96
Part-1-1.419, PX, 1166.7
Part-1-1.420, PX, 1181.25
Part-1-1.421, PX, 1195.63
Part-1-1.422, PX, 1209.83
Part-1-1.517, PX, 687.54
Part-1-1.518, PX, 711.957
Part-1-1.519, PX, 735.564
Part-1-1.520, PX, 758.437
Part-1-1.521, PX, 780.64
Part-1-1.522, PX, 802.228
Part-1-1.523, PX, 823.251
Part-1-1.524, PX, 843.75
Part-1-1.525, PX, 863.763
Part-1-1.526, PX, 883.322
Part-1-1.527, PX, 132.378
Part-1-1.528, PX, 229.286
Part-1-1.529, PX, 296.007
Part-1-1.530, PX, 350.24
Part-1-1.531, PX, 397.135
Part-1-1.532, PX, 439.049
Part-1-1.533, PX, 477.297
Part-1-1.534, PX, 512.699
Part-1-1.535, PX, 545.81
Part-1-1.536, PX, 577.024
Part-1-1.537, PX, 606.634
Part-1-1.538, PX, 634.864
Part-1-1.539, PX, 661.892
**
** OUTPUT REQUESTS
**
*Restart, write, frequency=0
**
** FIELD OUTPUT: F-Output-1
**
*Output, field
*Node Output
CF, RF, RM, U, UR
*Element Output, directions=YES
MISES, NFORCSO, S, SF
**
** HISTORY OUTPUT: H-Output-1
**
*Output, history, variable=PRESELECT
*End Step
